*Heading
*Preprint, echo=NO, model=NO, history=NO, contact=NO
**
** PARTS
**
*Node
      1,  0.600000024,           0.
      2,  0.600000024,  0.400000006
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*Element, type=CPE4R
 1,   1,  15,  89,  29
 2,  15,  16,  90,  89
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*Nset, nset=HYDRA, generate
   1,  223,    1
*Elset, elset=HYDRA, generate
   1,  197,    1
** Section: Section-1
*Solid Section, elset=HYDRA, material=Material-1
1.,
**
*Nset, nset= SYM_X
  1,  5,  7, 25, 26, 27, 28, 29, 33, 34, 35
*Elset, elset= SYM_X
  1,  5,  9, 13, 17, 21, 37, 38, 39, 40
*Nset, nset=ASYM_Y
  4,  5, 11, 14, 22, 23, 24, 78, 79, 80, 81, 82, 83, 84, 85, 86
*Elset, elset=ASYM_Y
  21,  22,  23,  24,  65,  75,  85,  95, 105, 115, 125, 135, 145, 155, 185
**
** MATERIALS
**
*Material, name=Material-1
*Elastic
1., 0.3
*USER OUTPUT VARIABLES
2
** ----------------------------------------------------------------
**
** STEP: Step-1
**
*Step, name=Step-1
*Static, direct
0.1, 1.,
**
** BOUNDARY CONDITIONS
**
** Name: BCX Type: Symmetry/Antisymmetry/Encastre
*Boundary
 SYM_X, XSYMM
ASYM_Y, YASYMM
**
** LOADS
**
*Cload
7, 1, 0.00166667
36, 1, 0.01000000
37, 1, 0.02000000
38, 1, 0.03000000
6, 1, 0.04000000
39, 1, 0.05000000
40, 1, 0.06000000
41, 1, 0.07000000
42, 1, 0.08000000
43, 1, 0.09000000
8, 1, 0.04833333
**
** OUTPUT REQUESTS
**
*Restart, write, frequency=0
**
** FIELD OUTPUT: F-Output-1
**
*Output, field
*Element Output, directions=YES
UVARM,
*Output, field, variable=PRESELECT
*EL FILE,ELSET=HYDRA,POSITION=AVERAGED
SINV,UVARM
**
** HISTORY OUTPUT: H-Output-1
**
*Output, history, variable=PRESELECT
*End Step
